# 1. Вычислить выражение
x := 2
n := 2
y := (sqrt(x^3 + n) + cos(|n*x - 1|)^2)/(nthroot(x^5 + sin(x) + n, 4)*cos(π/4*(x + n)))
y = -1.70417
# 2. Вычислить значения переменных p,q,w при x=7, y=10,  z=-3
x := 7
y := 10
z := -3
p :=
    (sin(x) + 3*|y| - z^2) if (x > y)
    (y + 3)/sqrt(z^2 + 1)*ln(|x + 1|) otherwise
p = 8.5485
q :=
    (cos(x) + 2*|y + 1| - z) if (x > y) and (x < 1)
    (x*y + 3)/sqrt(y^2 + 5) otherwise
q = 7.12407
w :=
    (x^2 + 2*(y*x + 1) - z) if (x < y) or (y ≥ 10)
    ((x^-3*y^2 + 3)*sqrt(z^2 + 7)) otherwise
w = 194
# 3. Вычислить и отобразить на экране значения функции
x := -2, -1.6 .. 2
n := 3
f(x) := (x^2 - n*x + sin(x))*sqrt(|x - cos(n*x)|)
f(x) = [15.6407; 8.26243; 2.26215; 0.581154; 0.847445; 0; -0.126223; -1.29279; -1.77811; -1.52552; -1.11221]
## 4.Выполнить действия с использованием массивов.
n := 8
a := -3*n
b := 3*n
i := 1 .. 3
ORIGIN := 1
A[i] := a + rnd(b - a)
C[i] := a + rnd(b - a)
B[i] := a + rnd(b - a)
transpose(A) = [22.6009, 9.71374, -19.0294]
transpose(B) = [11.5152, -23.7881, 21.9078]
transpose(C) = [-1.61776, -21.644, -18.3999]
s := A*B
s = -387.709
V := B×C
V = [911.869; 176.437; -287.718]
w := (A×B)*C
w = 27798
s := A[1]*B[1] + A[2]*B[2] + A[3]*B[3]
s = -387.709
V := [B[2]*C[3] - B[3]*C[2]; B[3]*C[1] - B[1]*C[3]; B[1]*C[2] - B[2]*C[1]]
V = [911.869; 176.437; -287.718]
l := [A[2]*B[3] - A[3]*B[2]; A[3]*B[1] - A[1]*B[3]; A[1]*B[2] - A[2]*B[1]]
w := l[1]*C[1] + l[2]*C[2] + l[3]*C[3]
w = 27798
LA := |A|
LA = 31.1011
LB := |B|
LB = 34.3282
LC := |C|
LC = 28.4541
answer :=
    "Это А" if (LA ≥ LB) and (LA ≥ LC)
    "Это B" if (LB ≥ LA) and (LB ≥ LC)
    "Это C" otherwise
answer = "Это B"
n := 11
M[n, n] := 0
i := 1 .. n
j := 1 .. n
M[i, j] := round(rnd(20) - 10)
M = [
    5, 4, 3, -9, 7, 8, -7, 1, -6, 7, 7;
    10, 4, 6, 9, -4, -6, 9, -5, 7, -6, 5;
    -3, 3, 5, -2, 10, -3, 3, 0, -5, -9, -1;
    3, -5, 2, -8, 0, 4, -3, 9, -1, 0, 6;
    5, -9, 10, 3, 8, 8, 0, 5, 5, -3, 6;
    -1, -8, 3, -3, 0, 1, 4, -2, 8, 2, 6;
    6, -8, 10, 0, 1, 7, 10, -2, -2, 9, -4;
    1, 8, -9, -4, -5, -3, 6, -4, 9, 9, -8;
    -5, -6, 8, -9, 4, 1, -8, 5, -4, -7, -3;
    2, 9, 4, -9, -10, 10, -4, -7, -6, -2, 4;
    4, -8, 5, -5, -7, -1, 2, 2, -4, 7, -7
]
M1 := sum(sum(M[i, j], j = 1 .. n), i = 1 .. n)
M1 = 84
M2 := sum(sum(if(M[i, j] > 0, M[i, j], 0), j = 1 .. n), i = 1 .. n)
M2 = 354
M3 := sum(sum(if(M[i, j] < 0, M[i, j], 0), j = 1 .. n), i = 1 .. n)
M3 = -270
u := M[:, 1]
v := transpose(M)[:, n]
M4 := u*v
M4 = -104
## 5.Построить график функции «быстрым» способом
y(x) := exp(-|x|/3)*cos(x)
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## 6.Построить график функции, подготовив данные самостоятельно
f(x) :=
    exp(x)*x^3 if (x < 0)
    exp(-x)*x^3 if (x ≥ 0)
x := -9, -8.75 .. 9
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## 7.Выполнить  указанные действия.
g(x) := sqrt(|x|)*sin(x)
ORIGIN := 0
N := (2*π - (-2*π))/(π/4)
h := π/4
i := 0 .. N
X[i] := -2*π + i*h
Y[i] := g(X[i])
X = [-6.28319; -5.49779; -4.71239; -3.92699; -3.14159; -2.35619; -1.5708; -0.785398; 0; 0.785398; 1.5708; 2.35619; 3.14159; 3.92699; 4.71239; 5.49779; 6.28319]
Y = [0; 1.65798; 2.1708; 1.40125; 0; -1.0854; -1.25331; -0.626657; 0; 0.626657; 1.25331; 1.0854; 0; -1.40125; -2.1708; -1.65798; 0]
WRITEPRN("X.txt") := X
XX := READPRN("X.txt")
WRITEPRN("Y.txt") := Y
YY := READPRN("Y.txt")
XX = [-6.283; -5.498; -4.712; -3.927; -3.142; -2.356; -1.571; -0.7854; 0; 0.7854; 1.571; 2.356; 3.142; 3.927; 4.712; 5.498; 6.283]
YY = [0; 1.658; 2.171; 1.401; 0; -1.085; -1.253; -0.6267; 0; 0.6267; 1.253; 1.085; 0; -1.401; -2.171; -1.658; 0]
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## 8.В одной системе координат построить график функций
q(x) := exp(-x^2)
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## 9.Построить график поверхности "быстрым способом"
f(x, y) := sin(sqrt(x^2 + y^2))/sqrt(x^2 + y^2)
# [component: inputs f]
## 10.Найти все корни уравнения
f(x) := x^2 + (x - 2)*sin(x) - 5
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x := -1
x1 := root(f(x), x)
f(x1) = 9.76996e-15
x1 = -1.32936
x := 2
x2 := root(f(x), x)
x2 = 2.19967
f(x2) = 3.52607e-13
## 11.Найти все корни уравнения
f1(t) := t^2 + t*sin(2*t) - (t - 5)*cos(t)
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t1 := root(f1(t), t, -3, -2)
t1 = -2.97354
f1(t1) = -1.77636e-15
t2 := root(f1(t), t, -2, -1)
t2 = -1.93283
f1(t2) = 0
## 12.Найти все корни полинома
n := 2
v := [-3*n; 3 - 4*n; 4 - n; 1]
r := polyroots(v)
r = [-3; -1; 2]
## 13.Решить систему линейных уравнений
A := [n, n + 1, n + 2; n - 3, n - 2, n; n - 1, n, n + 1]
B := [6*n + 8; 6*n - 7; 6*n + 2]
X := A^-1*B
X = [1; 2; 3]
x := 0
y := 0
z := 0
Given
n*x + (n + 1)*y + (n + 2)*z == 6*n + 8
(n - 3)*x + (n - 2)*y + n*z == 6*n - 7
(n - 1)*x + n*y + (n + 1)*z == 6*n + 2
res := Find(x, y, z)
res = [1; 2; 3]
A*res = [20; 5; 14]
B = [20; 5; 14]
## 14.Найти координаты точек пересечения эллипса
x := 8
y := 2
Given
x^2/81 + y^2/16 == 1
(x - 9)^2 + (y - 2)^2 == 25
P1 := Find(x, y)
P1 = [4.23934; 3.52845]
x := 5
y := -2
Given
f(i, j) := -3 + i*1
x^2/81 + y^2/16 == 1
V1 := matrix(11, 1, f)
V1 = [-3; -2; -1; 0; 1; 2; 3; 4; 5; 6; 7]
(x - 9)^2 + (y - 2)^2 == 25
P2 := Find(x, y)
x := -10, -10.05 .. 15  # error: This range variable must be defined with sequential values.
P2 = [6.9308; -2.55175]
a1(x) := 4*sqrt(1 - x^2/81)
a2(x) := -4*sqrt(1 - x^2/81)
p1(x) := 2 + sqrt(25 - (x - 9)^2)
p2(x) := 2 - sqrt(25 - (x - 9)^2)
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## 15.Найти все локальные максимумы и минимумы функции
F(x) := x*sin(x)
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x := 2
Given
x_max1 := Maximize(F, x)
x_max1 = 2.02876
F(x_max1) = 1.81971
x := 5
Given
x_min1 := Minimize(F, x)
x_min1 = 4.91318
F(x_min1) = -4.81447
x := 8
Given
x_max2 := Maximize(F, x)
x_max2 = 7.97867
F(x_max2) = 7.91673
