ч
X := [2; 2; -3; 0; 3; 2; 2; -2; -2]
Y := [0; 0; 0; 4; 0; 0; -4; -4; 0]
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Xwmin := min(X)
Xwmin = -3
Ywmin := min(Y)
Ywmin = -4
Xwmax := max(X)
Xwmax = 3
Ywmax := max(Y)
Ywmax = 4
Wxmin := 100
Wxmax := 400
Wymin := 200
Wymax := 500
kx := (Wxmax - Wxmin)/(Xwmax - Xwmin)
ky := (Wymax - Wymin)/(Ywmax - Ywmin)
i := 0 .. 8
T := [kx, 0, Wxmin; 0, -ky, Wymax; 0, 0, 1]
Vw[i] := T*[X[i] - Xwmin; Y[i] - Ywmin; 1]
Xwin[i] := Vw[i][0]
Ywin[i] := Vw[i][1]
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f(x) := sin(π*x)*sqrt(|x|)
x[1] := -6
x[2] := 6
dx := 0.1
N := (x[2] - x[1])/dx
N = 120
i := 0 .. N
x[i] := x[1] + i*dx
y[i] := f(x[i])
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Xwmin := min(x)
Xwmin = -6
Ywmin := min(y)
Ywmin = -2.34521
Xwmax := max(x)
Xwmax = 6.1
Ywmax := max(y)
Ywmax = 2.34521
Wxmin := 100
Wxmax := 800
Wymin := 200
Wymax := 900
kx := (Wxmax - Wxmin)/(Xwmax - Xwmin)
ky := (Wymax - Wymin)/(Ywmax - Ywmin)
i := 0 .. N
T := [kx, 0, Wxmin; 0, -ky, Wymax; 0, 0, 1]
Vw[i] := T*[x[i] - Xwmin; y[i] - Ywmin; 1]
Xwin[i] := Vw[i][0]
Ywin[i] := Vw[i][1]
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