x := 1
a := -90*deg
y := 1
Given
(x - 4)/(6 - 4) == (y - 2)/(3 - 2)
(x - 4)/(6 - 4) == (y - 8)/(7 - 8)
P := Find(x, y)
P = [10; 5]
F := [4, 4, 6, 6, 4; 2, 8, 7, 3, 2; 1, 1, 1, 1, 1]
T1 := [1, 0, -P[0]; 0, 1, -P[1]; 0, 0, 1]
R := [cos(a), -sin(a), 0; sin(a), cos(a), 0; 0, 0, 1]
T2 := [1, 0, P[0]; 0, 1, P[1]; 0, 0, 1]
M := T2*R*T1
Fnew := M*F
Fnew = [7, 13, 12, 8, 7; 11, 11, 9, 9, 11; 1, 1, 1, 1, 1]
X[0] := transpose(F)[:, 0]
X[1] := transpose(Fnew)[:, 0]
Y[0] := transpose(F)[:, 1]
Y[1] := transpose(Fnew)[:, 1]
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