# deg := π/180
r := 10
φ := 315*deg
θ := 45*deg
T := [
    -sin(φ), cos(φ), 0, 0;
    -cos(φ)*sin(θ), -sin(φ)*sin(θ), cos(θ), 0;
    -cos(φ)*cos(θ), -sin(φ)*cos(θ), -sin(θ), r;
    0, 0, 0, 1
]
V := [4, 0, 0, 2, 0, 0; 0, 0, 4, 0, 0, 2; 0, 0, 0, 3, 3, 3; 1, 1, 1, 1, 1, 1]
P := T*V
x_wL := 200
y_wL := 100
xmin := min(transpose(P)[:, 0])
ymin := min(transpose(P)[:, 1])
x_wH := 700
y_wH := 500
xmax := max(transpose(P)[:, 0])
ymax := max(transpose(P)[:, 1])
ScaleX(x, xmin, xmax) := x_wL + (x - xmin)*(x_wH - x_wL)/(xmax - xmin)
ScaleY(y, ymin, ymax) := y_wL + (y - ymin)*(y_wH - y_wL)/(ymax - ymin)
S := [0; 1; 2; 0; 3; 4; 1; 4; 5; 2; 5; 3]
i := 0 .. 11
X_draw[i] := ScaleX(P[0, S[i]], xmin, xmax)
Y_draw[i] := ScaleY(P[1, S[i]], ymin, ymax)
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S_vis := [0; 1; 4; 3; 0; 2; 5; 4; 3; 5]
k := 0 .. 9
m := 0 .. 1
X_vis[k] := ScaleX(P[0, S_vis[k]], xmin, xmax)
Y_vis[k] := ScaleY(P[1, S_vis[k]], ymin, ymax)
S_inv := [1; 2]
X_inv[m] := ScaleX(P[0, S_inv[m]], xmin, xmax)
Y_inv[m] := ScaleY(P[1, S_inv[m]], ymin, ymax)
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φ_sec := 30 deg
N := [0; sin(φ_sec); cos(φ_sec)]
A0 := [0; 0; 1.5]
vA := [4; 0; 0]
vA1 := [2; 0; 3]
vB := [0; 0; 0]
vB1 := [0; 0; 3]
vC := [0; 4; 0]
vC1 := [0; 2; 3]
tA := (transpose(N)*(A0 - vA))/(transpose(N)*(vA1 - vA))
tB := (transpose(N)*(A0 - vB))/(transpose(N)*(vB1 - vB))
tC := (transpose(N)*(A0 - vC))/(transpose(N)*(vC1 - vC))
PA := vA + tA*(vA1 - vA)
PB := vB + tB*(vB1 - vB)
PC := vC + tC*(vC1 - vC)
V_sec := [PA[0], PA[1], PA[2], 1; PB[0], PB[1], PB[2], 1; PC[0], PC[1], PC[2], 1; PA[0], PA[1], PA[2], 1]
P_cut := T*transpose(V_sec)
xwL2 := 100
ywL2 := 200
xwH2 := 800
ywH2 := 900
xc_min := min(transpose(P_cut)[:, 0])
xc_max := max(transpose(P_cut)[:, 0])
yc_min := min(transpose(P_cut)[:, 1])
yc_max := max(transpose(P_cut)[:, 1])
ScaleX2(x, xmin, xmax) := xwL2 + (x - xmin)*(xwH2 - xwL2)/(xmax - xmin)
ScaleY2(y, ymin, ymax) := ywL2 + (y - ymin)*(ywH2 - ywL2)/(ymax - ymin)
j := 0 .. 3
X_cut[j] := ScaleX2(P_cut[(0, j)], xc_min, xc_max)
Y_cut[j] := ScaleY2(P_cut[(1, j)], yc_min, yc_max)
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